# Исходные данные:
# проекция диаметра главного зеркала на ось ХУ
Dm := 900*10^-3  # м
# фокусное расстояние главного зеркала
F := 818.82*10^-3  # м
# смещение центра участка главного зеркала относительно его фокальной оси
h := 596.05*10^-3  # м
# максимальное расстояние по оси Z между краями зеркал
Lt := 735.51*10^-3  # м
# угол наклона между осями Zsr и Zmr
β := 25*deg
# параметр σ для антенн Кассегрена
σ := -1
# Расчёт
# Угол наклона центра используемого участка главного зеркала от фокальной оси
Θ_0 := -2*atan(h/(2*F)) = -39.9999 deg
# Угол наклона верхнего края используемого участка главного зеркала от фокальной оси
Θ_U := -2*atan((2*h + Dm)/(4*F)) = -65.1372 deg
# Угол наклона нижнего края используемого участка главного зеркала от фокальной оси
Θ_L := -2*atan((2*h - Dm)/(4*F)) = -10.1927 deg
# Эксцентриситет побочного зеркала
e := (1 - σ*sqrt(tan(β/2)/tan((β - Θ_0)/2)))/(1 + σ*sqrt(tan(β/2)/tan((β - Θ_0)/2))) = 3.87696
# Угол между направлением центрального луча на субрефлектор(ось Zf) и осью Zsr
α := 2*atan((e + 1)/(e - 1)*tan(β/2)) = 41.1937 deg
# Угол между осью Zf и краем субрефлектора
Θ_e := -σ*(2*atan((1 - e)/(1 + e)*tan((Θ_U - β)/2)) - α) = 19.9999 deg
# не забыть, что формула 38 с ошибкой
# Параметр покрытия субрефлектора
a := (Lt + (2*h - Dm)^2/(16*F) - F)/(((σ - 1)/2)*(e^2 - 1)*cos(Θ_U)/(e*cos(β - Θ_U) + 1) - ((σ + 1)/2)*(e^2 - 1)*cos(Θ_L)/(e*cos(β - Θ_L) + 1)) = 0.0128974
# Половина межфокального расстояния субрефлектора
f := a*e = 0.0500027
# Проекция апертуры субрефлектора на ось Xsr
Ds_x := -σ*a*((e^2 - 1)*sin(β - Θ_U)/(e*cos(β - Θ_U) + 1) - (e^2 - 1)*sin(β - Θ_L)/(e*cos(β - Θ_L) + 1)) = 0.157636
# Расстояние между цетрами зеркал
Lm := -a*(e^2 - 1)/(e*cos(β - Θ_0) + 1) - h/sin(Θ_0) = 0.858707
# Расстояние от точки фокуса до центра субрефлектора
Ls := a*(2 + (e^2 - 1)/(e*cos(β - Θ_0) + 1)) = 0.0943801
# Минимальное расстояние
# по вертикальной оси
# между краями зеркал
d_sr_mr := h - Dm/2 - a*((σ - 1)/2)*(e^2 - 1)*sin(Θ_U)/(e*cos(β - Θ_U) + 1) + a*((σ + 1)/2)*(e^2 - 1)*sin(Θ_L)/(e*cos(β - Θ_L) + 1) = -0.0196774
# Расстояние по вертикальной оси между точкой фокуса и нижним краем главного зеркала
d_f_mr := h - Dm/2 + 2*f*sin(β) = 0.188314
# Максимальное расстояние
# между краями рефлекторов
Ht := h + Dm/2 - a*((σ - 1)/2)*(e^2 - 1)*sin(Θ_L)/(e*cos(β - Θ_L) + 1) + a*((σ + 1)/2)*(e^2 - 1)*sin(Θ_U)/(e*cos(β - Θ_U) + 1) = 1.03837
OP0 := σ*(2*a - Ls) = 0.0685853
OP1 := -σ*a*(e^2 - 1)/(e*cos(Θ_L - β) + 1) = 0.0434134
OP2 := -σ*a*(e^2 - 1)/(e*cos(Θ_U - β) + 1) = 0.182656
F0P1 := 2*a - σ*OP1 = 0.0692082
F0P2 := 2*a - σ*OP2 = 0.208451
F_0.x := -2*f*sin(β) = -0.0422641
x_Csr := (F0P1*sin(α + σ*Θ_e) + F0P2*sin(α - σ*Θ_e))/2 = 0.103838
F_0.z := -2*f*cos(β) = -0.0906357
z_Csr := a*sqrt(1 + x_Csr^2/(f^2 - a^2)) - f = -0.0194279
Q_0.x := h = 0.59605
Q_1.x := h - Dm/2 = 0.14605
Q_2.x := h + Dm/2 = 1.04605
Q_0.z := h^2/(4*F) - F = -0.710348
Q_1.z := (2*h - Dm)^2/(16*F) - F = -0.812307
Q_2.z := (2*h + Dm)^2/(16*F) - F = -0.484735
P_0.x := σ*OP0*sin(Θ_0) = 0.0440856
P_1.x := σ*OP1*sin(Θ_L) = 0.00768239
P_2.x := σ*OP2*sin(Θ_U) = 0.165727
P_0.z := σ*OP0*cos(Θ_0) = -0.0525395
P_1.z := σ*OP1*cos(Θ_L) = -0.0427282
P_2.z := σ*OP2*cos(Θ_U) = -0.0767974
Q := [Q_0.x, Q_0.z; Q_1.x, Q_1.z; Q_2.x, Q_2.z]
P := [P_0.x, P_0.z; P_1.x, P_1.z; P_2.x, P_2.z]
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Ds_y(φ) := 2*a*(e^2 - 1)*sin(Θ_e)*sin(φ)/(e*(-sin(α)*sin(Θ_e)*cos(φ) + cos(α)*cos(Θ_e)) - 1)
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φ := 0
φ_max := Maximize(Ds_y, φ) = 1.04548
Ds_y(φ_max) = 0.0821601
