N := 5
f.c := (100 + N*5)*10^3 = 125000
R := (1 + N*0.2)*10^3 = 2000
Q := 50 + N*5 = 75
T_m := 10/f.c = 8e-5  # выбрал 100 мкс
T_c := 1/f.c = 8e-6
T_i := 1/(10*f.c) = 8e-7  # выбрал 100 нс
τ := R*C
τ := 10*T_c = 8e-5
C := τ/R = 4e-8
Uvh := [0.001; 0.4; 0.8; 1.2; 1.6; 2]
Usr1 := [3.038*10^-12; 7.3*10^-7; 0.094; 0.448; 0.822; 1.2]
Usr2 := [3.012*10^-12; 4.56*10^-7; 0.081; 0.424; 0.785; 1.14]
Usr3 := [2.771*10^-12; 1.0*10^-7; 0.11; 0.467; 0.846; 1.23] = [2.771e-12; 1e-7; 0.11; 0.467; 0.846; 1.23]
KL1 := Usr1/Uvh = [3.038e-9; 1.825e-6; 0.1175; 0.373333; 0.51375; 0.6]
KL2 := Usr2/Uvh = [3.012e-9; 1.14e-6; 0.10125; 0.353333; 0.490625; 0.57]
KL3 := Usr3/Uvh = [2.771e-9; 2.5e-7; 0.1375; 0.389167; 0.52875; 0.615]
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phi := [-200; -180; -160; -140; -120; -100; -80; -60; -40; -20; 0; 20; 40; 60; 80; 100; 120; 140; 160; 180; 200]
Us1 := [-0.0836; -0.0891; -0.0837; -0.0683; -0.0447; -0.0156; 0.0153; 0.0444; 0.0681; 0.0836; 0.0891; 0.0837; 0.0683; 0.0447; 0.0156; -0.0153; -0.0444; -0.0681; -0.0836; -0.0891; -0.0837]
transpose(phi) = [-200, -180, -160, -140, -120, -100, -80, -60, -40, -20, 0, 20, 40, 60, 80, 100, 120, 140, 160, 180, 200]
transpose(Us) =  # error: Эта переменная не определена.
Ufd1(p) := 0.891*0.1*cos(p*1)
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cos(0) = 1
0.0891/0.1 = 0.891
f.c := 250*10^3 = 250000
C := 620*10^-12
f_c := 1/(2*π*C*2000) = 128351
12500 - 12.5 = 12487.5
2*π*0.6*10^-6/(1/f.c)*180/π = 54
phi := [-200; -180; -160; -140; -120; -100; -80; -60; -40; -20; 0; 20; 40; 60; 80; 100; 120; 140; 160; 180; 200]
Us := [0.0297; 0.00016; -0.0294; -0.0554; -0.0747; -0.085; -0.0851; -0.0749; -0.0556; -0.0297; -0.000154; 0.0294; 0.0554; 0.0747; 0.085; 0.0851; 0.0749; 0.0556; 0.0297; 0.00016; -0.0294]
Ufd(p) := 0.891*0.1*cos(p*1)
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131.2 - 119.5 = 11.7
fs := 125*10^3
L := 1*10^-3
0.1*fs*0.1 = 1250
(0.0454 + 0.0274)/((125.1 - 124.9)*10^3) = 0.000364
f01 := fs - 0.015*fs = 123125
f02 := fs + 0.015*fs = 126875
C1 := 1/((2*π*f01)^2*L) = 1.67089e-9
f011 := f01 - 1.5*f01/75 = 120662
C2 := 1/((2*π*f02)^2*L) = 1.57358e-9
f022 := f02 + 1.5*f02/75 = 129412
ro1 := sqrt(L/C1) = 773.617
ro2 := sqrt(L/C2) = 797.179
R1 := ro1*75 = 58021.3
R2 := ro2*75 = 59788.4
