Kpr1 := [
    1, 0.000176;
    100, 0.0191;
    200, 0.0376;
    300, 0.0545;
    400, 0.0697;
    500, 0.0843;
    600, 0.0991;
    700, 0.114;
    800, 0.129;
    900, 0.144;
    1000, 0.159
]
Kp1 := [
    1, 0.000233;
    100, 0.0213;
    200, 0.042;
    300, 0.0617;
    400, 0.0803;
    500, 0.0991;
    600, 0.119;
    700, 0.14;
    800, 0.162;
    900, 0.186;
    1000, 0.211
]
Kpr1[:, 0] = [1; 100; 200; 300; 400; 500; 600; 700; 800; 900; 1000]
Kpr2 := [
    1, 0.000232;
    100, 0.0236;
    200, 0.0485;
    300, 0.075;
    400, 0.103;
    500, 0.131;
    600, 0.161;
    700, 0.191;
    800, 0.222;
    900, 0.253;
    1000, 0.283
]
Kp2 := [
    1, 0.000261;
    100, 0.0267;
    200, 0.0556;
    300, 0.0873;
    400, 0.122;
    500, 0.159;
    600, 0.199;
    700, 0.241;
    800, 0.286;
    900, 0.334;
    1000, 0.385
]
Kpr3 := [
    1, 0.000465;
    100, 0.0472;
    200, 0.0971;
    300, 0.15;
    400, 0.205;
    500, 0.263;
    600, 0.322;
    700, 0.382;
    800, 0.442;
    900, 0.49;
    1000, 0.527
]
Kp3 := [
    1, 1.18*10^-6;
    100, 0.000119;
    200, 0.000245;
    300, 0.000381;
    400, 0.000522;
    500, 0.000671;
    600, 0.000822;
    700, 0.000975;
    800, 0.00112;
    900, 0.00121;
    1000, 0.00127
]
Kpr3[:, 1]/(Kpr3[:, 0]*10^-3) = [0.465; 0.472; 0.4855; 0.5; 0.5125; 0.526; 0.536667; 0.545714; 0.5525; 0.544444; 0.527]
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Kp3[:, 1]/(Kp3[:, 0]*10^-3) = [0.00118; 0.00119; 0.001225; 0.00127; 0.001305; 0.001342; 0.00137; 0.00139286; 0.0014; 0.00134444; 0.00127]
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Q1 := sqrt(100 - 1)/(350/320 - 320/350) = 55.4421
100/2 = 50
Ck1 := 1/((2*π*320*10^3)^2*1*10^-3) = 2.47366e-10
Ck1e24 := 247.5*10^-12
f0 := 1/(2*π*sqrt(1*10^-3*Ck1e24)) = 319913
ro1 := sqrt((1*10^-3)/Ck1) = 2010.62
Rk1 := ro1*Q1 = 111473
G1 := 0.071/0.0843/(0.0102/0.0991) = 8.18284
Q3 := sqrt(100 - 1)/(1020/320 - 320/1020) = 3.4623
Rk1 := ro1*Q3 = 6961.37
